# OpenSim document version 40000
Model MoBL_ARMS_Upper_Limb_Model_OpenSim:
  assembly_accuracy: 0.0001
  gravity: 0 -9.80665 0
  publications: Comp Meth Biomech Biomed Eng 2014
  length_units: meters
  force_units: N
  credits:
    Katherine R. Saul, Wendy M. Murray, Craig M. Goehler, Melissa Daly, Meghan E. Vidt, Dustin L. Crouch
  defaults: Millard2012EquilibriumMuscle default: min_control=0.01 optimal_force=1 max_isometric_force=546
      optimal_fiber_length=0.0535 tendon_slack_length=0.078 pennation_angle_at_optimal=0.1396263 [radians]
      max_contraction_velocity=10 activation_time_constant=0.015 [seconds] deactivation_time_constant=0.05 [seconds]
  Ground
  BodySet:
    Body thorax: mass=26.83 [kg] mass_center=(0 -0.16 0) inertia=(1.4745 0.7555 1.4314 0 0 0)
        meshes=(thorax.vtp ground_spine.vtp ground_skull.vtp ground_jaw.vtp)
      WrapEllipsoid Thorax: xyz_body_rotation=(0.0434587 -0.331962 0.189892) translation=(-0.0386 -0.1273 0.0709)
          quadrant=all dimensions=(0.1 0.135 0.08)
    Body clavicle: mass=0.156 mass_center=(-0.011096 0.0063723 0.054168)
        inertia=(0.00024259 0.00025526 4.442e-5 -1.898e-5 -6.994e-5 5.371e-5) meshes=clavicle.vtp
    Body clavphant: mass=0.0001 mass_center=(0 0 0) inertia=(1 1 1 0 0 0)
    Body scapula: mass=0.70396 mass_center=(-0.054694 -0.035032 -0.043734)
        inertia=(0.0012429 0.0011504 0.0013651 0.0004494 0.00040922 0.0002411) meshes=scapula.vtp
      WrapEllipsoid Deltoid2: xyz_body_rotation=(3.13042 -1.54881 -1.31423) translation=(-0.0058 -0.0378 0.0096)
          quadrant=-y dimensions=(0.033 0.04 0.035)
      WrapTorus Delt3: xyz_body_rotation=(0.620988 0.32882 -0.560774) translation=(-0.0973 -0.0428 -0.037) quadrant=all
          inner_radius=0.04 outer_radius=0.06
      WrapTorus INFSP: xyz_body_rotation=(0.0253073 0.58835 0.151844) translation=(-0.0561 -0.0199 -0.0112)
          quadrant=all inner_radius=0.008 outer_radius=0.019
      WrapEllipsoid TMIN: xyz_body_rotation=(-2.09754 -0.280823 -1.76348) translation=(-0.0418 -0.0519 -0.0359)
          quadrant=x dimensions=(0.03 0.03 0.05)
      WrapCylinder TRIlongglen: xyz_body_rotation=(1.37532 -0.294612 2.43596) translation=(-0.0359 -0.0309 -0.0132)
          quadrant=x radius=0.003 length=0.03
    Body scapphant: mass=0.0001 mass_center=(0 0 0) inertia=(1 1 1 0 0 0)
    Body humphant: mass=0.0001 mass_center=(0 0 0) inertia=(1 1 1 0 0 0)
    Body humphant1: mass=0.0001 mass_center=(0 0 0) inertia=(1 1 1 0 0 0)
    Body humerus: mass=1.99757 mass_center=(0.018064 -0.140141 -0.012746)
        inertia=(0.0122776 0.00255133 0.0125789 -0.00034741 -0.0002325 0.0012293) meshes=humerus.vtp
      WrapEllipsoid DELT1hh: xyz_body_rotation=(-0.584685 1.50046 0.570374) translation=(-0.0039 -0.0127 -0.00262)
          quadrant=all dimensions=(0.05 0.05 0.04)
      WrapCylinder delt2hum: xyz_body_rotation=(1.55093 -0.0199582 0.0596618) translation=(0.0017 -0.0958 0.0011)
          quadrant=all radius=0.0109 length=0.12
      WrapEllipsoid delt3hum: xyz_body_rotation=(1.72735 0.0759218 -2.74313) translation=(0.0019 -0.0592 0.0011)
          quadrant=x dimensions=(0.01 0.01 0.05)
      WrapEllipsoid SUPSP: xyz_body_rotation=(0.0380482 0.00855211 -1.30673) translation=(0.0002 0.0077 0.0043)
          quadrant=all dimensions=(0.02 0.02 0.02)
      WrapEllipsoid INFSP_and_TMIN_hum_head: xyz_body_rotation=(-0.286583 -0.00907571 -0.0684169)
          translation=(-0.0003 0.0026 0.0038) quadrant=all dimensions=(0.02 0.025 0.02)
      WrapEllipsoid SUBSCAP: xyz_body_rotation=(-0.924501 0.288852 0.381529) translation=(-0.0025 0.0007 -0.0045)
          quadrant=all dimensions=(0.02 0.017 0.028)
      WrapCylinder TMINhum: xyz_body_rotation=(1.75353 0.0692896 2.74628) translation=(-0.0014 -0.0455 0) quadrant=x
          radius=0.007 length=0.07
      WrapCylinder TMAJ_LAThum: xyz_body_rotation=(1.53641 -0.0637045 1.41424) translation=(0.0007 -0.0443 -0.0055)
          quadrant=-x radius=0.007 length=0.04
      WrapCylinder PEC12hum: xyz_body_rotation=(1.55928 -0.0774926 -0.925897) translation=(0.002 -0.0508 -0.0017)
          quadrant=x radius=0.009 length=0.07
      WrapSphere PEC23hh: translation=(-0.0086 0.0021 -0.0004) quadrant=all radius=0.02
      WrapEllipsoid PEC1hh: xyz_body_rotation=(-0.620465 -0.310494 0.363727) translation=(-0.0037 0.0005 -0.0025)
          quadrant=-z dimensions=(0.03 0.02 0.02)
      WrapCylinder PEC3hum: xyz_body_rotation=(1.44094 -0.0561996 1.75196) translation=(0.0009 -0.0551 -0.0004)
          quadrant=-x radius=0.008 length=0.1
      WrapCylinder LAT_TMAJhh: xyz_body_rotation=(-0.305084 -0.018326 -0.686613) translation=(-0.0224 0.0102 0.0094)
          quadrant=-y radius=0.007 length=0.045
      WrapSphere LAT_TMAJ2hh: xyz_body_rotation=(-0.127235 0.276111 0.0197222) translation=(-0.0016 0.0092 0.0052)
          quadrant=-z radius=0.03
      WrapEllipsoid Elbow_BIC_BRD: xyz_body_rotation=(-0.128631 0.137532 0.0307178) translation=(0.0019 -0.289 -0.014)
          quadrant=x dimensions=(0.015 0.015 0.1)
      WrapSphere TRIlonghh: xyz_body_rotation=(0.2 -3.06 -2.015) translation=(-0.002 0.002 0.002) quadrant=all
          radius=0.026
      WrapCylinder TRI: xyz_body_rotation=(-0.14015 -0.00628319 0.154985) translation=(0.0028 -0.2919 -0.0119)
          quadrant=all radius=0.016 length=0.1
      WrapEllipsoid ANC: xyz_body_rotation=(0.00750492 -0.196699 1.04929) translation=(0.0134 -0.2861 -0.0008)
          quadrant=-x dimensions=(0.02 0.02 0.02)
      WrapSphere BIClong: xyz_body_rotation=(0 0.5 1) translation=(0.00233 0.0023 0.003) quadrant=x radius=0.025
      WrapSphere TMAJ_LAT_PEC_CORBhh: translation=(0.0007 0 0.006) quadrant=all radius=0.03
      WrapSphere DELT_TMAJ_LAT_PEC_CORBhh: translation=(0.0007 0 0.006) quadrant=all radius=0.03
      WrapCylinder CORBhum: xyz_body_rotation=(-1.60832 0.0959931 0.875283) translation=(0.0027 -0.1202 -0.0059)
          quadrant=x radius=0.008 length=0.1
      WrapEllipsoid Elbow_PT_ECRL: xyz_body_rotation=(-0.161094 -0.110828 0.61453) translation=(0.003 -0.2872 -0.0069)
          quadrant=x dimensions=(0.018 0.025 0.035)
    Body ulna: mass=1.1053 mass_center=(0.00971783 -0.0959509 0.024286)
        inertia=(0.00541309 0.00115318 0.00494361 0.00031686 -7.615e-5 0.00109169) meshes=ulna.vtp
    Body radius: mass=0.23359 mass_center=(0.0336341 -0.181559 0.0156)
        inertia=(0.00043855 8.859e-5 0.00040258 3.014e-5 -4.24e-6 6.418e-5) meshes=radius.vtp
      WrapCylinder SUP: xyz_body_rotation=(1.44775 0.304036 -2.44102) translation=(0.0045 -0.0437 0.0059) quadrant=-x
          radius=0.008 length=0.04
    Body proximal_row: mass=0.0001 mass_center=(0 0 0) inertia=(1e-5 1e-5 1e-5 0 0 0)
        meshes=(lunate.vtp sdfastSCAPHOIDw.vtp sdfastPISIFORMw.vtp sdfastTRIQUETRALw.vtp)
    Body r_hand: mass=0.5819 mass_center=(-0.00301314 -0.0424993 -0.00112205)
        inertia=(0.00011 6e-5 0.00015 9e-7 -2e-7 1.2e-5)
        meshes=(sdfast_1seg_hand_fr_c_5mc.vtp sdfast_1seg_hand_fr_c_4mc.vtp sdfast_1seg_hand_fr_c_3mc.vtp sdfast_1seg_hand_fr_c_2mc.vtp sdfast_1seg_hand_fr_c_trapezium.vtp sdfast_1seg_hand_fr_c_trapezoid.vtp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)
  JointSet:
    WeldJoint ground_thorax: socket_parent_frame=ground_offset socket_child_frame=thorax_offset
      PhysicalOffsetFrame ground_offset: socket_parent=/ground translation=(0 0.8 0) [meters]
      PhysicalOffsetFrame thorax_offset: socket_parent=/bodyset/thorax translation=(0 0 0)
    CustomJoint sternoclavicular: socket_parent_frame=thorax_offset socket_child_frame=clavicle_offset
      Coordinate sternoclavicular_r2: default_value=-0.02534692 range=(-99999.9 99999.9) clamped=false
      Coordinate sternoclavicular_r3: default_value=0.01073576 range=(-99999.9 99999.9) clamped=false
      PhysicalOffsetFrame thorax_offset: socket_parent=/bodyset/thorax translation=(0.006325 0.00693 0.025465)
      PhysicalOffsetFrame clavicle_offset: socket_parent=/bodyset/clavicle translation=(0 0 0)
      SpatialTransform: axes_held_at_zero=(rotation3 translation1 translation2 translation3)
        TransformAxis rotation1: coordinates=sternoclavicular_r2 axis=(0.0153 0.9892987 -0.1451)
            LinearFunction(coefficients=1 0)
        TransformAxis rotation2: coordinates=sternoclavicular_r3 axis=(-0.9944725 0 -0.104997)
            LinearFunction(coefficients=1 0)
    CustomJoint unrotscap: socket_parent_frame=clavicle_offset socket_child_frame=clavphant_offset
      Coordinate unrotscap_r3: default_value=-0.01073576 range=(-99999.9 99999.9) clamped=false
      Coordinate unrotscap_r2: default_value=0.02534692 range=(-99999.9 99999.9) clamped=false
      PhysicalOffsetFrame clavicle_offset: socket_parent=/bodyset/clavicle translation=(-0.01433 0.02007 0.135535)
      PhysicalOffsetFrame clavphant_offset: socket_parent=/bodyset/clavphant translation=(0 0 0)
      SpatialTransform: axes_held_at_zero=(rotation3 translation1 translation2 translation3)
        TransformAxis rotation1: coordinates=unrotscap_r3 axis=(-0.9944725 0 -0.104997)
            LinearFunction(coefficients=1 0)
        TransformAxis rotation2: coordinates=unrotscap_r2 axis=(0.0153 0.9892987 -0.1451)
            LinearFunction(coefficients=1 0)
    CustomJoint acromioclavicular: socket_parent_frame=clavphant_offset socket_child_frame=scapula_offset
      Coordinate acromioclavicular_r2: default_value=-0.005132236 range=(-99999.9 99999.9) clamped=false
      Coordinate acromioclavicular_r3: default_value=0.04147693 range=(-99999.9 99999.9) clamped=false
      Coordinate acromioclavicular_r1: default_value=0.01864359 range=(-99999.9 99999.9) clamped=false
      PhysicalOffsetFrame clavphant_offset: socket_parent=/bodyset/clavphant translation=(0 0 0)
      PhysicalOffsetFrame scapula_offset: socket_parent=/bodyset/scapula translation=(0 0 0)
      SpatialTransform: axes_held_at_zero=(translation1 translation2 translation3)
        TransformAxis rotation1: coordinates=acromioclavicular_r2 axis=(0.1570949 0.9472686 -0.2792909)
            LinearFunction(coefficients=1 0)
        TransformAxis rotation2: coordinates=acromioclavicular_r3 axis=(-0.754084 0.297594 0.585487)
            LinearFunction(coefficients=1 0)
        TransformAxis rotation3: coordinates=acromioclavicular_r1 axis=(0.6376998 0.1186 0.7610998)
            LinearFunction(coefficients=1 0)
    CustomJoint unrothum: socket_parent_frame=scapula_offset socket_child_frame=scapphant_offset
      Coordinate unrothum_r1: default_value=-0.01864359 range=(-99999.9 99999.9) clamped=false
      Coordinate unrothum_r3: default_value=-0.04147693 range=(-99999.9 99999.9) clamped=false
      Coordinate unrothum_r2: default_value=0.005132236 range=(-99999.9 99999.9) clamped=false
      PhysicalOffsetFrame scapula_offset: socket_parent=/bodyset/scapula translation=(-0.00955 -0.034 0.009)
      PhysicalOffsetFrame scapphant_offset: socket_parent=/bodyset/scapphant translation=(0 0 0)
      SpatialTransform: axes_held_at_zero=(translation1 translation2 translation3)
        TransformAxis rotation1: coordinates=unrothum_r1 axis=(0.6376998 0.1186 0.7610998)
            LinearFunction(coefficients=1 0)
        TransformAxis rotation2: coordinates=unrothum_r3 axis=(-0.754084 0.297594 0.585487)
            LinearFunction(coefficients=1 0)
        TransformAxis rotation3: coordinates=unrothum_r2 axis=(0.1570949 0.9472686 -0.2792909)
            LinearFunction(coefficients=1 0)
    CustomJoint shoulder0: socket_parent_frame=scapphant_offset socket_child_frame=humphant_offset
      Coordinate elv_angle: default_value=1.5 range=(-1.570796 1.744) clamped=true locked=true
      PhysicalOffsetFrame scapphant_offset: socket_parent=/bodyset/scapphant translation=(0 0 0)
      PhysicalOffsetFrame humphant_offset: socket_parent=/bodyset/humphant translation=(0 0 0)
      SpatialTransform: axes_held_at_zero=(rotation2 rotation3 translation1 translation2 translation3)
        TransformAxis rotation1: coordinates=elv_angle axis=(0.0048 0.9990892 0.04240001)
            LinearFunction(coefficients=1 0)
    CustomJoint shoulder: socket_parent_frame=humphant_offset socket_child_frame=humphant1_offset
      Coordinate r_shoulder_elev: default_value=0.08889801 range=(0 3.141593) clamped=true
      Coordinate shoulder1_r2: default_value=-1.500868 range=(-99999.9 99999.9) clamped=false
      PhysicalOffsetFrame humphant_offset: socket_parent=/bodyset/humphant translation=(0 0 0)
      PhysicalOffsetFrame humphant1_offset: socket_parent=/bodyset/humphant1 translation=(0 0 0)
      SpatialTransform: axes_held_at_zero=(rotation3 translation1 translation2 translation3)
        TransformAxis rotation1: coordinates=r_shoulder_elev axis=(-0.9982614 0.0023 0.05889802)
            LinearFunction(coefficients=1 0)
        TransformAxis rotation2: coordinates=shoulder1_r2 axis=(0.0048 0.9990892 0.04240001)
            LinearFunction(coefficients=1 0)
    CustomJoint shoulder2: socket_parent_frame=humphant1_offset socket_child_frame=humerus_offset
      Coordinate shoulder_rot: default_value=0.3 range=(-1.570796 0.3490659) clamped=true locked=true
      PhysicalOffsetFrame humphant1_offset: socket_parent=/bodyset/humphant1 translation=(0 0 0)
      PhysicalOffsetFrame humerus_offset: socket_parent=/bodyset/humerus translation=(0 0 0)
      SpatialTransform: axes_held_at_zero=(rotation2 rotation3 translation1 translation2 translation3)
        TransformAxis rotation1: coordinates=shoulder_rot axis=(0.0048 0.9990892 0.04240001)
            LinearFunction(coefficients=1 0)
    CustomJoint elbow: socket_parent_frame=humerus_offset socket_child_frame=ulna_offset
      Coordinate r_elbow_flexion: default_value=1.537038 range=(0 2.268928) clamped=true
      PhysicalOffsetFrame humerus_offset: socket_parent=/bodyset/humerus translation=(0.0061 -0.2904 -0.0123)
      PhysicalOffsetFrame ulna_offset: socket_parent=/bodyset/ulna translation=(0 0 0)
      SpatialTransform: axes_held_at_zero=(rotation2 rotation3 translation1 translation2 translation3)
        TransformAxis rotation1: coordinates=r_elbow_flexion axis=(0.04940001 0.03660001 0.9981083)
            LinearFunction(coefficients=1 0)
    CustomJoint radioulnar: socket_parent_frame=ulna_offset socket_child_frame=radius_offset
      Coordinate pro_sup: default_value=0.1745477 range=(-1.570796 1.570796) clamped=true locked=true
      PhysicalOffsetFrame ulna_offset: socket_parent=/bodyset/ulna translation=(0.0004 -0.011503 0.019999)
      PhysicalOffsetFrame radius_offset: socket_parent=/bodyset/radius translation=(0 0 0)
      SpatialTransform: axes_held_at_zero=(rotation2 rotation3 translation1 translation2 translation3)
        TransformAxis rotation1: coordinates=pro_sup axis=(-0.01716099 0.9926656 -0.119668)
            LinearFunction(coefficients=1 0)
    WeldJoint radiocarpal: socket_parent_frame=radius_offset socket_child_frame=proximal_row_offset
      PhysicalOffsetFrame radius_offset: socket_parent=/bodyset/radius translation=(0.018 -0.242 0.025)
      PhysicalOffsetFrame proximal_row_offset: socket_parent=/bodyset/proximal_row translation=(0 0 0)
    WeldJoint wrist_hand: socket_parent_frame=proximal_row_offset socket_child_frame=hand_offset
      PhysicalOffsetFrame proximal_row_offset: socket_parent=/bodyset/proximal_row
          translation=(0.003992 -0.015054 0.002327)
      PhysicalOffsetFrame hand_offset: socket_parent=/bodyset/r_hand translation=(0 0 0)
  ConstraintSet:
    CoordinateCouplerConstraint [values shared by the 11 below unless stated]: independent_coordinate_names=r_shoulder_elev
        scale_factor=1
    CoordinateCouplerConstraint sternoclavicular_r2_con: dependent_coordinate_name=sternoclavicular_r2
      coupled_coordinates_function: SimmSpline: x=(0 2.61799) y=(0 -0.633555)
    CoordinateCouplerConstraint sternoclavicular_r3_con: dependent_coordinate_name=sternoclavicular_r3
      coupled_coordinates_function: SimmSpline: x=(0 3.14159) y=(0 0.322013)
    CoordinateCouplerConstraint unrotscap_r2_con: dependent_coordinate_name=unrotscap_r2
      coupled_coordinates_function: SimmSpline: x=(0 2.61799) y=(0 0.633555)
    CoordinateCouplerConstraint unrotscap_r3_con: dependent_coordinate_name=unrotscap_r3
      coupled_coordinates_function: SimmSpline: x=(0 3.14159) y=(0 -0.322013)
    CoordinateCouplerConstraint acromioclavicular_r1_con: dependent_coordinate_name=acromioclavicular_r1
      coupled_coordinates_function: SimmSpline: x=(0 2.61799) y=(0 0.466003)
    CoordinateCouplerConstraint acromioclavicular_r2_con: dependent_coordinate_name=acromioclavicular_r2
      coupled_coordinates_function: SimmSpline: x=(0 2.61799) y=(0 -0.128282)
    CoordinateCouplerConstraint acromioclavicular_r3_con: dependent_coordinate_name=acromioclavicular_r3
      coupled_coordinates_function: SimmSpline: x=(0 2.61799) y=(0 1.03673)
    CoordinateCouplerConstraint unrothum_r1_con: dependent_coordinate_name=unrothum_r1
      coupled_coordinates_function: SimmSpline: x=(0 2.61799) y=(0 -0.466003)
    CoordinateCouplerConstraint unrothum_r2_con: dependent_coordinate_name=unrothum_r2
      coupled_coordinates_function: SimmSpline: x=(0 2.61799) y=(0 0.128282)
    CoordinateCouplerConstraint unrothum_r3_con: dependent_coordinate_name=unrothum_r3
      coupled_coordinates_function: SimmSpline: x=(0 2.61799) y=(0 -1.03673)
    CoordinateCouplerConstraint shoulder1_r2_con: independent_coordinate_names=elv_angle
        dependent_coordinate_name=shoulder1_r2
      coupled_coordinates_function: SimmSpline: x=(-1.5708 3.14159) y=(1.5708 -3.14159)
  ForceSet:
    CoordinateLimitForce shoulder_elv_ligaments: coordinate=r_shoulder_elev upper_stiffness=100 [N*m/degree]
        upper_limit=160 [degrees] lower_stiffness=100 [N*m/degree] lower_limit=20 [degrees] damping=0.01
        transition=500 [degrees]
    CoordinateLimitForce elv_angle_ligaments: coordinate=elv_angle upper_stiffness=100 upper_limit=90
        lower_stiffness=100 lower_limit=-60 damping=0.01 transition=500
    CoordinateLimitForce shoulder_rot_ligaments: coordinate=shoulder_rot upper_stiffness=100 upper_limit=0
        lower_stiffness=100 lower_limit=-60 damping=0.01 transition=500 compute_dissipation_energy=false
    CoordinateLimitForce r_elbow_flexion_ligaments: coordinate=r_elbow_flexion upper_stiffness=0.3037 upper_limit=85
        lower_stiffness=100 lower_limit=14 damping=0.01 transition=139.5813
    CoordinateLimitForce pro_sup_ligaments: coordinate=pro_sup upper_stiffness=50 upper_limit=60 lower_stiffness=50
        lower_limit=-60 damping=0 transition=430.1186
    CoordinateLimitForce pro_sup_damping: coordinate=pro_sup upper_stiffness=1e-8 upper_limit=190 lower_stiffness=1e-8
        lower_limit=190 damping=0.001745 transition=1
    Millard2012EquilibriumMuscle [values shared by the 7 below unless stated]: optimal_force=1
        ignore_tendon_compliance=true fiber_damping=0.1 minimum_activation=0.01
      ActiveForceLengthCurve: minimum_value=0
      ForceVelocityCurve: concentric_slope_at_vmax=0 concentric_slope_near_vmax=0.25 isometric_slope=5
          eccentric_slope_at_vmax=0 eccentric_slope_near_vmax=0.15 max_eccentric_velocity_force_multiplier=1.4
      FiberForceLengthCurve
      TendonForceLengthCurve
    Millard2012EquilibriumMuscle DELT1: max_isometric_force=1218.9 optimal_fiber_length=0.0976
        tendon_slack_length=0.093 pennation_angle_at_optimal=0.3839724
      PathPoint P1: humerus (0.00896 -0.11883 0.00585)
      PathPoint P2: humerus (0.01623 -0.11033 0.00412)
      PathPoint P3: scapula (0.04347 -0.03252 0.00099)
      PathPoint P4: clavicle (-0.014 0.01106 0.08021)
      PathWrap pathwrap_0: wrap_object=DELT1hh method=hybrid range=(2 3)
    Millard2012EquilibriumMuscle TRIlong: max_isometric_force=771.8 optimal_fiber_length=0.134
        tendon_slack_length=0.143 pennation_angle_at_optimal=0.2094395
      PathPoint P1: scapula (-0.04565 -0.04073 -0.01377)
      PathPoint P2: humerus (-0.027 -0.11 -0.006)
      PathPoint P3: humerus (-0.03184 -0.22637 -0.01217)
      PathPoint P4: humerus (-0.01743 -0.26757 -0.01208)
      PathPoint P5: ulna (-0.0219 0.01046 -0.00078)
      PathWrap pathwrap_0: wrap_object=TRIlonghh method=hybrid range=(1 3)
      PathWrap: wrap_object=TRI method=hybrid
    Millard2012EquilibriumMuscle TRIlat: max_isometric_force=717.5 optimal_fiber_length=0.1138
        tendon_slack_length=0.098 pennation_angle_at_optimal=0.1570796
      PathPoint P1: humerus (-0.00599 -0.12646 0.00428)
      PathPoint P2: humerus (-0.02344 -0.14528 0.00928)
      PathPoint P3: humerus (-0.03184 -0.22637 -0.01217)
      PathPoint P4: humerus (-0.01743 -0.26757 -0.01208)
      PathPoint P5: ulna (-0.0219 0.01046 -0.00078)
      PathWrap: wrap_object=TRI method=hybrid
    Millard2012EquilibriumMuscle TRImed: max_isometric_force=717.5 optimal_fiber_length=0.1138
        tendon_slack_length=0.0908 pennation_angle_at_optimal=0.1570796
      PathPoint P1: humerus (-0.00838 -0.13695 -0.00906)
      PathPoint P2: humerus (-0.02601 -0.15139 -0.0108)
      PathPoint P3: humerus (-0.03184 -0.22637 -0.01217)
      PathPoint P4: humerus (-0.01743 -0.26757 -0.01208)
      PathPoint P5: ulna (-0.0219 0.01046 -0.00078)
      PathWrap: wrap_object=TRI method=hybrid
    Millard2012EquilibriumMuscle BIClong: max_isometric_force=525.1 optimal_fiber_length=0.1157
        tendon_slack_length=0.2723 pennation_angle_at_optimal=0
      PathPoint P1: scapula (-0.03123 -0.02353 -0.01305)
      PathPoint P2: scapula (-0.02094 -0.01309 -0.00461)
      PathPoint P3: humerus (0.02131 0.01793 0.01028)
      PathPoint P4: humerus (0.02378 -0.00511 0.01201)
      PathPoint P5: humerus (0.01345 -0.02827 0.00136)
      PathPoint P6: humerus (0.01068 -0.07736 -0.00165)
      PathPoint P7: humerus (0.01703 -0.12125 0.00024)
      PathPoint P8: humerus (0.0228 -0.1754 -0.0063)
      MovingPathPoint default: radius socket_x_coordinate=/jointset/radioulnar/pro_sup
          socket_y_coordinate=/jointset/radioulnar/pro_sup socket_z_coordinate=/jointset/radioulnar/pro_sup
        x_location: SimmSpline: x=(-1.57561 1.57823) y=(-0.0055 0.01096)
        y_location: PiecewiseLinearFunction: x=(-1.57561 0 1.57561) y=(-0.0282 -0.035 -0.0392)
        z_location: SimmSpline: x=(-1.57561 0.0866167 1.57561) y=(-0.01 -0.01358 -0.01083)
      PathPoint P11: radius (-0.002 -0.0375 -0.002)
      PathWrap: wrap_object=Elbow_BIC_BRD method=hybrid
      PathWrap pathwrap_0: wrap_object=BIClong method=midpoint range=(2 5)
    Millard2012EquilibriumMuscle BICshort: max_isometric_force=316.8 optimal_fiber_length=0.1321
        tendon_slack_length=0.1923 pennation_angle_at_optimal=0
      PathPoint P1: scapula (0.01268 -0.03931 -0.02625)
      PathPoint P2: scapula (0.00093 -0.06704 -0.01593)
      PathPoint P3: humerus (0.01117 -0.07576 -0.01101)
      PathPoint P4: humerus (0.01703 -0.12125 -0.01079)
      PathPoint P5: humerus (0.0228 -0.1754 -0.0063)
      MovingPathPoint default: radius socket_x_coordinate=/jointset/radioulnar/pro_sup
          socket_y_coordinate=/jointset/radioulnar/pro_sup socket_z_coordinate=/jointset/radioulnar/pro_sup
        x_location: SimmSpline: x=(-1.57561 1.57823) y=(-0.0055 0.01096)
        y_location: PiecewiseLinearFunction: x=(-1.57561 0 1.57561) y=(-0.0282 -0.035 -0.0392)
        z_location: SimmSpline: x=(-1.57561 0.0866167 1.57561) y=(-0.01 -0.01358 -0.01083)
      PathPoint P8: radius (-0.002 -0.0375 -0.002)
      PathWrap: wrap_object=Elbow_BIC_BRD method=hybrid
    Millard2012EquilibriumMuscle BRA: max_isometric_force=1177.37 optimal_fiber_length=0.0858
        tendon_slack_length=0.0535 pennation_angle_at_optimal=0
      PathPoint P1: humerus (0.0068 -0.1739 -0.0036)
      ConditionalPathPoint P2: humerus (0.01894 -0.28559 -0.01105) socket_coordinate=/jointset/elbow/r_elbow_flexion
          range=(0 0.813149) [radians]
      ConditionalPathPoint P3: ulna (0.00498 -0.01463 0.00128) socket_coordinate=/jointset/elbow/r_elbow_flexion
          range=(0 0.813149)
      PathPoint P4: ulna (-0.0032 -0.0239 0.0009)
  MarkerSet:
    Marker r_hand_com: r_hand (-0.00301314 -0.0424993 -0.00112205)
